*Heading
** Job name: tensile-explicit Model name: tensile-explicit
** Generated by: Abaqus/CAE 2023
*Preprint, echo=NO, model=NO, history=NO, contact=NO
**
** PARTS
**
*Part, name=Part-1
*End Part
**
**
** ASSEMBLY
**
*Assembly, name=Assembly
**
*Instance, name=Part-1-1, part=Part-1
*Node
      1,          0.5,           0.,           0.
      2,           0.,           0.,           0.
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*Element, type=C3D8T
   1,    8,  570, 5331,  759,    1,   29, 1679,  404
   2,  570,  569, 5332, 5331,   29,   30, 1680, 1679
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*Nset, nset=Set-1, generate
     1,  33540,      1
*Elset, elset=Set-1, generate
     1,  16642,      1
** Section: Section-1
*Solid Section, elset=Set-1, material=Material-1
,
*End Instance
**
*Nset, nset=Set-4, instance=Part-1-1
   27,   28, 1651, 1652, 1653, 1654
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*Elset, elset=Set-4, instance=Part-1-1
 12720, 12742, 12746, 12749, 12756, 12757
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*Nset, nset=Set-5, instance=Part-1-1
   23,   24, 1532, 1533, 1534, 1535
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*Elset, elset=Set-5, instance=Part-1-1
  8757,  8758,  8777,  8779,  8780,  8783
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*Nset, nset=Set-20, instance=Part-1-1
   27,   28, 1651, 1652, 1653, 1654
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*Elset, elset=Set-20, instance=Part-1-1
 12720, 12742, 12746, 12749, 12756, 12757
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*Nset, nset=Set-21, instance=Part-1-1
   23,   24, 1532, 1533, 1534, 1535
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*Elset, elset=Set-21, instance=Part-1-1
  8757,  8758,  8777,  8779,  8780,  8783
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*Nset, nset=Set-22, instance=Part-1-1
   23,   24, 1532, 1533, 1534, 1535
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*Elset, elset=Set-22, instance=Part-1-1
  8757,  8758,  8777,  8779,  8780,  8783
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*Nset, nset=Set-28, instance=Part-1-1
   25,   26,   27,   28, 1584, 1585
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*Elset, elset=Set-28, instance=Part-1-1
 12720, 12742, 12746, 12749, 12756, 12757
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*Nset, nset=Set-29, instance=Part-1-1
   19,   20,   23,   24, 1445, 1446
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*End Assembly
*Amplitude, name=Amp-1, definition=SMOOTH STEP
             0.,              0.,           0.001,              1.
**
** MATERIALS
**
*Material, name=Material-1
*Conductivity
1.,
*Density
 2.33e-07,
*Depvar
     16,
*Inelastic Heat Fraction
          1.,
*Specific Heat
6742.,
*User Material, constants=4
210000.,  0.3, 0.01,  2.7
**
** BOUNDARY CONDITIONS
**
** Name: BC-3 Type: Displacement/Rotation
*Boundary
Set-28, 1, 1
Set-28, 2, 2
Set-28, 3, 3
** Name: BC-4 Type: Displacement/Rotation
*Boundary
Set-29, 1, 1
Set-29, 2, 2
Set-29, 3, 3
** ----------------------------------------------------------------
**
** STEP: Step-1
**
*Step, name=Step-1, nlgeom=NO
*Dynamic Temperature-displacement, Explicit, direct user control
1e-09, 0.001
*Bulk Viscosity
0.06, 1.2
**
** BOUNDARY CONDITIONS
**
** Name: BC-4 Type: Displacement/Rotation
*Boundary, amplitude=Amp-1
Set-29, 1, 1
Set-29, 2, 2, 0.01
Set-29, 3, 3
**
** OUTPUT REQUESTS
**
*Restart, write, number interval=1, time marks=NO
**
** FIELD OUTPUT: F-Output-1
**
*Output, field, number interval=100
*Node Output
NT, RF, U
*Element Output, directions=YES
E, S, SDV, STATUS, TEMP
**
** HISTORY OUTPUT: H-Output-1
**
*Output, history, variable=PRESELECT
*End Step
